// SBML level 2 version 3

model model()

  // Compartments:
  compartment cell = 1;

  // Species:
  species S1 in cell = 100/cell; S1 is "S()";
  species S2 in cell = 10/cell; S2 is "E()";
  species S3 in cell = 0; S3 is "ES()";
  species S4 in cell = 0; S4 is "P()";

  // Parameters:
  log_k1 = -4.6052;
  log_k2 = 0;
  log_k3 = 0;

  // Assignment rules:
  S := 0 + S1;
  E := 0 + S2;
  ES := 0 + S3;
  P := 0 + S4;
  k1 := 10^log_k1;
  k2 := 10^log_k2;
  k3 := 10^log_k3;

  // Reactions:
  R1: S1 + S2 => S3; k1*S1*S2;
  R2: S3 => S1 + S2; k2*S3;
  R3: S3 => S2 + S4; k3*S3;

  // Unit definitions:
  unit substance = item;
end
